<neuroml xmlns="http://www.neuroml.org/schema/neuroml2"  xmlns:xs="http://www.w3.org/2001/XMLSchema" xmlns:xsi="http://www.w3.org/2001/XMLSchema-instance" xsi:schemaLocation="http://www.neuroml.org/schema/neuroml2 https://raw.github.com/NeuroML/NeuroML2/development/Schemas/NeuroML2/NeuroML_v2.3.1.xsd" id="TestL23">
    <notes>

This NeuroML 2 file was generated by OpenCortex v0.1.18 using:
    libNeuroML v0.6.1
    pyNeuroML v1.3.5

    </notes>
    <property tag="Network seed" value="134344"/>
    <include href="TestL23/SupLTSInter.cell.nml"/>
    <include href="TestL23/ar__m00_25.channel.nml"/>
    <include href="TestL23/cad__beta0_02__phi260000.nml"/>
    <include href="TestL23/cad__beta0_05__phi520000.nml"/>
    <include href="TestL23/cal.channel.nml"/>
    <include href="TestL23/cat_a.channel.nml"/>
    <include href="TestL23/k2.channel.nml"/>
    <include href="TestL23/ka.channel.nml"/>
    <include href="TestL23/kahp_slower.channel.nml"/>
    <include href="TestL23/kc_fast.channel.nml"/>
    <include href="TestL23/kdr_fs.channel.nml"/>
    <include href="TestL23/km.channel.nml"/>
    <include href="TestL23/naf2__a0__b0__c0__d0__fastNa_shiftmin2_5.channel.nml"/>
    <include href="TestL23/nap.channel.nml"/>
    <include href="TestL23/pas.channel.nml"/>
    <include href="TestL23/SupAxAx.cell.nml"/>
    <include href="TestL23/cat.channel.nml"/>
    <include href="TestL23/SupBasket.cell.nml"/>
    <include href="TestL23/L23PyrRS.cell.nml"/>
    <include href="TestL23/cad__beta0_01__phi26000.nml"/>
    <include href="TestL23/cad__beta0_05__phi52000.nml"/>
    <include href="TestL23/kahp.channel.nml"/>
    <include href="TestL23/kc.channel.nml"/>
    <include href="TestL23/kdr.channel.nml"/>
    <include href="TestL23/naf__a0__b0__c0__d0__fastNa_shiftmin3_5.channel.nml"/>
    <include href="TestL23/Syn_AMPA_SupPyr_SupFS.synapse.nml"/>
    <include href="TestL23/Syn_AMPA_SupPyr_SupLTS.synapse.nml"/>
    <include href="TestL23/Syn_AMPA_SupPyr_SupPyr.synapse.nml"/>
    <include href="TestL23/Syn_GABAA_SupAxAx_SupPyr.synapse.nml"/>
    <include href="TestL23/Syn_GABAA_SupBask_SupAxAx.synapse.nml"/>
    <include href="TestL23/Syn_GABAA_SupBask_SupBask.synapse.nml"/>
    <include href="TestL23/Syn_GABAA_SupBask_SupLTS.synapse.nml"/>
    <include href="TestL23/Syn_GABAA_SupBask_SupPyr.synapse.nml"/>
    <include href="TestL23/Syn_GABAA_SupLTS_FS.synapse.nml"/>
    <include href="TestL23/Syn_GABAA_SupLTS_LTS.synapse.nml"/>
    <include href="TestL23/Syn_GABAA_SupLTS_SupPyr.synapse.nml"/>
    <include href="TestL23/Syn_NMDA_RSPyr_SupFS.synapse.nml"/>
    <include href="TestL23/Syn_NMDA_RSPyr_SupLTS.synapse.nml"/>
    <include href="TestL23/Syn_NMDA_SupPyr_SupPyr.synapse.nml"/>
    <include href="TestL23/SynForEctStim.synapse.nml"/>
    <pulseGenerator id="DepCurr_L23RS_TO_CG3D_L23PyrRS_Pulse" delay="0.0 ms" duration="20000.0 ms" amplitude="1 uA"/>
    <poissonFiringSynapse id="BackgroundL23RS_TO_CG3D_L23PyrRS_PoiSyn0" averageRate="1000.000000 Hz" synapse="Syn_AMPA_SupPyr_SupPyr" spikeTarget="./Syn_AMPA_SupPyr_SupPyr"/>
    <poissonFiringSynapse id="EctopicStimL23RS_TO_CG3D_L23PyrRS_PoiSyn0" averageRate="0.100000 Hz" synapse="SynForEctStim" spikeTarget="./SynForEctStim"/>
    <network id="TestL23" type="networkWithTemperature" temperature="32degC">
        <population id="CG3D_L23PyrRS" component="L23PyrRS" size="10" type="populationList">
            <instance id="0">
                <location x="-158.841310296757513" y="-430.118999580273055" z="10.9331207862881"/>
            </instance>
            <instance id="1">
                <location x="141.792475313419857" y="-291.860215211394177" z="151.145387168085222"/>
            </instance>
            <instance id="2">
                <location x="-97.095312510780133" y="-478.585141863226966" z="201.078817444547553"/>
            </instance>
            <instance id="3">
                <location x="-143.090450518778169" y="-348.643492586510831" z="-9.635196120840448"/>
            </instance>
            <instance id="4">
                <location x="61.440847859376731" y="-184.860633599685087" z="135.961968380082169"/>
            </instance>
            <instance id="5">
                <location x="-16.360709678515263" y="-297.179410757356663" z="68.076998188113862"/>
            </instance>
            <instance id="6">
                <location x="162.030723585594728" y="-241.84986009602116" z="16.726456274755265"/>
            </instance>
            <instance id="7">
                <location x="38.544948928975202" y="-318.04228229064347" z="180.780087865983944"/>
            </instance>
            <instance id="8">
                <location x="153.102393696723311" y="-390.971665220531179" z="-136.505549086597057"/>
            </instance>
            <instance id="9">
                <location x="-79.770593936599397" y="-206.511810927915974" z="-228.65988805783212"/>
            </instance>
        </population>
        <population id="CG3D_SupBask" component="SupBasket" size="1" type="populationList">
            <instance id="0">
                <location x="117.369245013873922" y="-140.674613141580636" z="-26.669326248068444"/>
            </instance>
        </population>
        <population id="CG3D_SupAxAx" component="SupAxAx" size="1" type="populationList">
            <instance id="0">
                <location x="135.939205221260067" y="-205.774491216517077" z="-41.391158938715762"/>
            </instance>
        </population>
        <population id="CG3D_SupLTS" component="SupLTSInter" size="1" type="populationList">
            <instance id="0">
                <location x="-69.673970340266237" y="-474.283611356757888" z="-108.914323582031898"/>
            </instance>
        </population>
        <projection id="Proj0syn0_CG3D_L23PyrRS_CG3D_L23PyrRS" presynapticPopulation="CG3D_L23PyrRS" postsynapticPopulation="CG3D_L23PyrRS" synapse="Syn_AMPA_SupPyr_SupPyr">
            <connectionWD id="0" preCellId="../CG3D_L23PyrRS/3/L23PyrRS" preSegmentId="143" preFractionAlong="0.424672150999982" postCellId="../CG3D_L23PyrRS/0/L23PyrRS" postSegmentId="62" postFractionAlong="0.131152557804944" weight="1.0" delay="0.05 ms"/>
            <connectionWD id="1" preCellId="../CG3D_L23PyrRS/7/L23PyrRS" preSegmentId="142" preFractionAlong="0.982321842369104" postCellId="../CG3D_L23PyrRS/0/L23PyrRS" postSegmentId="9" postFractionAlong="0.978252921709588" weight="1.0" delay="0.05 ms"/>
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        </projection>
        <projection id="Proj0syn1_CG3D_L23PyrRS_CG3D_L23PyrRS" presynapticPopulation="CG3D_L23PyrRS" postsynapticPopulation="CG3D_L23PyrRS" synapse="Syn_NMDA_SupPyr_SupPyr">
            <connectionWD id="0" preCellId="../CG3D_L23PyrRS/3/L23PyrRS" preSegmentId="143" preFractionAlong="0.424672150999982" postCellId="../CG3D_L23PyrRS/0/L23PyrRS" postSegmentId="62" postFractionAlong="0.131152557804944" weight="1.0" delay="0.05 ms"/>
            <connectionWD id="1" preCellId="../CG3D_L23PyrRS/7/L23PyrRS" preSegmentId="142" preFractionAlong="0.982321842369104" postCellId="../CG3D_L23PyrRS/0/L23PyrRS" postSegmentId="9" postFractionAlong="0.978252921709588" weight="1.0" delay="0.05 ms"/>
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        </projection>
        <projection id="Proj2syn0_CG3D_L23PyrRS_CG3D_SupBask" presynapticPopulation="CG3D_L23PyrRS" postsynapticPopulation="CG3D_SupBask" synapse="Syn_NMDA_RSPyr_SupFS">
            <connectionWD id="0" preCellId="../CG3D_L23PyrRS/5/L23PyrRS" preSegmentId="147" preFractionAlong="0.03262717749725" postCellId="../CG3D_SupBask/0/SupBasket" postSegmentId="67" postFractionAlong="0.690502017512922" weight="2.5" delay="0.05 ms"/>
            <connectionWD id="1" preCellId="../CG3D_L23PyrRS/1/L23PyrRS" preSegmentId="143" preFractionAlong="0.615317797257832" postCellId="../CG3D_SupBask/0/SupBasket" postSegmentId="95" postFractionAlong="0.060221896838154" weight="2.5" delay="0.05 ms"/>
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        </projection>
        <projection id="Proj2syn1_CG3D_L23PyrRS_CG3D_SupBask" presynapticPopulation="CG3D_L23PyrRS" postsynapticPopulation="CG3D_SupBask" synapse="Syn_AMPA_SupPyr_SupFS">
            <connectionWD id="0" preCellId="../CG3D_L23PyrRS/5/L23PyrRS" preSegmentId="147" preFractionAlong="0.03262717749725" postCellId="../CG3D_SupBask/0/SupBasket" postSegmentId="67" postFractionAlong="0.690502017512922" weight="1.0" delay="0.05 ms"/>
            <connectionWD id="1" preCellId="../CG3D_L23PyrRS/1/L23PyrRS" preSegmentId="143" preFractionAlong="0.615317797257832" postCellId="../CG3D_SupBask/0/SupBasket" postSegmentId="95" postFractionAlong="0.060221896838154" weight="1.0" delay="0.05 ms"/>
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        </projection>
        <projection id="Proj3syn0_CG3D_L23PyrRS_CG3D_SupAxAx" presynapticPopulation="CG3D_L23PyrRS" postsynapticPopulation="CG3D_SupAxAx" synapse="Syn_NMDA_RSPyr_SupFS">
            <connectionWD id="0" preCellId="../CG3D_L23PyrRS/1/L23PyrRS" preSegmentId="142" preFractionAlong="0.233789108102859" postCellId="../CG3D_SupAxAx/0/SupAxAx" postSegmentId="44" postFractionAlong="0.737413805093127" weight="2.5" delay="0.05 ms"/>
            <connectionWD id="1" preCellId="../CG3D_L23PyrRS/6/L23PyrRS" preSegmentId="143" preFractionAlong="0.885808819528011" postCellId="../CG3D_SupAxAx/0/SupAxAx" postSegmentId="61" postFractionAlong="0.784113552333578" weight="2.5" delay="0.05 ms"/>
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        </projection>
        <projection id="Proj3syn1_CG3D_L23PyrRS_CG3D_SupAxAx" presynapticPopulation="CG3D_L23PyrRS" postsynapticPopulation="CG3D_SupAxAx" synapse="Syn_AMPA_SupPyr_SupFS">
            <connectionWD id="0" preCellId="../CG3D_L23PyrRS/1/L23PyrRS" preSegmentId="142" preFractionAlong="0.233789108102859" postCellId="../CG3D_SupAxAx/0/SupAxAx" postSegmentId="44" postFractionAlong="0.737413805093127" weight="1.0" delay="0.05 ms"/>
            <connectionWD id="1" preCellId="../CG3D_L23PyrRS/6/L23PyrRS" preSegmentId="143" preFractionAlong="0.885808819528011" postCellId="../CG3D_SupAxAx/0/SupAxAx" postSegmentId="61" postFractionAlong="0.784113552333578" weight="1.0" delay="0.05 ms"/>
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        </projection>
        <projection id="Proj4syn0_CG3D_L23PyrRS_CG3D_SupLTS" presynapticPopulation="CG3D_L23PyrRS" postsynapticPopulation="CG3D_SupLTS" synapse="Syn_NMDA_RSPyr_SupLTS">
            <connectionWD id="0" preCellId="../CG3D_L23PyrRS/8/L23PyrRS" preSegmentId="146" preFractionAlong="0.631312544886505" postCellId="../CG3D_SupLTS/0/SupLTSInter" postSegmentId="14" postFractionAlong="0.384356395931262" weight="2.5" delay="0.05 ms"/>
            <connectionWD id="1" preCellId="../CG3D_L23PyrRS/0/L23PyrRS" preSegmentId="147" preFractionAlong="0.993710938270465" postCellId="../CG3D_SupLTS/0/SupLTSInter" postSegmentId="40" postFractionAlong="0.183916692367412" weight="2.5" delay="0.05 ms"/>
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        </projection>
        <projection id="Proj4syn1_CG3D_L23PyrRS_CG3D_SupLTS" presynapticPopulation="CG3D_L23PyrRS" postsynapticPopulation="CG3D_SupLTS" synapse="Syn_AMPA_SupPyr_SupLTS">
            <connectionWD id="0" preCellId="../CG3D_L23PyrRS/8/L23PyrRS" preSegmentId="146" preFractionAlong="0.631312544886505" postCellId="../CG3D_SupLTS/0/SupLTSInter" postSegmentId="14" postFractionAlong="0.384356395931262" weight="1.0" delay="0.05 ms"/>
            <connectionWD id="1" preCellId="../CG3D_L23PyrRS/0/L23PyrRS" preSegmentId="147" preFractionAlong="0.993710938270465" postCellId="../CG3D_SupLTS/0/SupLTSInter" postSegmentId="40" postFractionAlong="0.183916692367412" weight="1.0" delay="0.05 ms"/>
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        </projection>
        <projection id="Proj5syn0_CG3D_SupBask_CG3D_L23PyrRS" presynapticPopulation="CG3D_SupBask" postsynapticPopulation="CG3D_L23PyrRS" synapse="Syn_GABAA_SupBask_SupPyr">
            <connectionWD id="0" preCellId="../CG3D_SupBask/0/SupBasket" preSegmentId="116" preFractionAlong="0.63306781796407" postCellId="../CG3D_L23PyrRS/0/L23PyrRS" postSegmentId="6" postFractionAlong="0.136107074766027" weight="1.0" delay="0.05 ms"/>
            <connectionWD id="1" preCellId="../CG3D_SupBask/0/SupBasket" preSegmentId="113" preFractionAlong="0.211103002347447" postCellId="../CG3D_L23PyrRS/0/L23PyrRS" postSegmentId="4" postFractionAlong="0.278163717463526" weight="1.0" delay="0.05 ms"/>
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        </projection>
        <projection id="Proj8syn0_CG3D_SupBask_CG3D_SupAxAx" presynapticPopulation="CG3D_SupBask" postsynapticPopulation="CG3D_SupAxAx" synapse="Syn_GABAA_SupBask_SupAxAx">
            <connectionWD id="0" preCellId="../CG3D_SupBask/0/SupBasket" preSegmentId="117" preFractionAlong="0.47252114304578" postCellId="../CG3D_SupAxAx/0/SupAxAx" postSegmentId="15" postFractionAlong="0.518081870857615" weight="1.0" delay="0.05 ms"/>
            <connectionWD id="1" preCellId="../CG3D_SupBask/0/SupBasket" preSegmentId="117" preFractionAlong="0.387659014085326" postCellId="../CG3D_SupAxAx/0/SupAxAx" postSegmentId="12" postFractionAlong="0.718589775730732" weight="1.0" delay="0.05 ms"/>
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        </projection>
        <projection id="Proj9syn0_CG3D_SupBask_CG3D_SupLTS" presynapticPopulation="CG3D_SupBask" postsynapticPopulation="CG3D_SupLTS" synapse="Syn_GABAA_SupBask_SupLTS">
            <connectionWD id="0" preCellId="../CG3D_SupBask/0/SupBasket" preSegmentId="112" preFractionAlong="0.557199434650742" postCellId="../CG3D_SupLTS/0/SupLTSInter" postSegmentId="10" postFractionAlong="0.204333149917849" weight="1.0" delay="0.05 ms"/>
            <connectionWD id="1" preCellId="../CG3D_SupBask/0/SupBasket" preSegmentId="117" preFractionAlong="0.952835855303402" postCellId="../CG3D_SupLTS/0/SupLTSInter" postSegmentId="65" postFractionAlong="0.437516753971847" weight="1.0" delay="0.05 ms"/>
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        </projection>
        <projection id="Proj10syn0_CG3D_SupAxAx_CG3D_L23PyrRS" presynapticPopulation="CG3D_SupAxAx" postsynapticPopulation="CG3D_L23PyrRS" synapse="Syn_GABAA_SupAxAx_SupPyr">
            <connectionWD id="0" preCellId="../CG3D_SupAxAx/0/SupAxAx" preSegmentId="113" preFractionAlong="0.187460705087438" postCellId="../CG3D_L23PyrRS/0/L23PyrRS" postSegmentId="136" postFractionAlong="0.33309196550211" weight="1.0" delay="0.05 ms"/>
            <connectionWD id="1" preCellId="../CG3D_SupAxAx/0/SupAxAx" preSegmentId="112" preFractionAlong="0.522739842341767" postCellId="../CG3D_L23PyrRS/0/L23PyrRS" postSegmentId="136" postFractionAlong="0.342820280694872" weight="1.0" delay="0.05 ms"/>
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        </projection>
        <projection id="Proj11syn0_CG3D_SupLTS_CG3D_L23PyrRS" presynapticPopulation="CG3D_SupLTS" postsynapticPopulation="CG3D_L23PyrRS" synapse="Syn_GABAA_SupLTS_SupPyr">
            <connectionWD id="0" preCellId="../CG3D_SupLTS/0/SupLTSInter" preSegmentId="113" preFractionAlong="0.998733129205048" postCellId="../CG3D_L23PyrRS/0/L23PyrRS" postSegmentId="118" postFractionAlong="0.561827170724131" weight="1.0" delay="0.05 ms"/>
            <connectionWD id="1" preCellId="../CG3D_SupLTS/0/SupLTSInter" preSegmentId="117" preFractionAlong="0.975416650337273" postCellId="../CG3D_L23PyrRS/0/L23PyrRS" postSegmentId="126" postFractionAlong="0.787001565359063" weight="1.0" delay="0.05 ms"/>
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        </projection>
        <projection id="Proj12syn0_CG3D_SupLTS_CG3D_SupBask" presynapticPopulation="CG3D_SupLTS" postsynapticPopulation="CG3D_SupBask" synapse="Syn_GABAA_SupLTS_FS">
            <connectionWD id="0" preCellId="../CG3D_SupLTS/0/SupLTSInter" preSegmentId="113" preFractionAlong="0.228493410122776" postCellId="../CG3D_SupBask/0/SupBasket" postSegmentId="19" postFractionAlong="0.271860873886255" weight="1.0" delay="0.05 ms"/>
            <connectionWD id="1" preCellId="../CG3D_SupLTS/0/SupLTSInter" preSegmentId="116" preFractionAlong="0.697236093818365" postCellId="../CG3D_SupBask/0/SupBasket" postSegmentId="34" postFractionAlong="0.189541740029674" weight="1.0" delay="0.05 ms"/>
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        </projection>
        <projection id="Proj13syn0_CG3D_SupLTS_CG3D_SupAxAx" presynapticPopulation="CG3D_SupLTS" postsynapticPopulation="CG3D_SupAxAx" synapse="Syn_GABAA_SupLTS_FS">
            <connectionWD id="0" preCellId="../CG3D_SupLTS/0/SupLTSInter" preSegmentId="117" preFractionAlong="0.76733008857717" postCellId="../CG3D_SupAxAx/0/SupAxAx" postSegmentId="77" postFractionAlong="0.764948536284286" weight="1.0" delay="0.05 ms"/>
            <connectionWD id="1" preCellId="../CG3D_SupLTS/0/SupLTSInter" preSegmentId="117" preFractionAlong="0.029814040122979" postCellId="../CG3D_SupAxAx/0/SupAxAx" postSegmentId="38" postFractionAlong="0.288269484149756" weight="1.0" delay="0.05 ms"/>
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        </projection>
        <inputList id="DepCurr_L23RS_TO_CG3D_L23PyrRS_0_0" population="CG3D_L23PyrRS" component="DepCurr_L23RS_TO_CG3D_L23PyrRS_Pulse">
            <inputW id="0" target="../CG3D_L23PyrRS/2/L23PyrRS" destination="synapses" segmentId="0" fractionAlong="0.5" weight="0.000095049361178"/>
            <inputW id="1" target="../CG3D_L23PyrRS/7/L23PyrRS" destination="synapses" segmentId="0" fractionAlong="0.5" weight="0.000082059409586"/>
            <inputW id="2" target="../CG3D_L23PyrRS/6/L23PyrRS" destination="synapses" segmentId="0" fractionAlong="0.5" weight="0.000055460335402"/>
            <inputW id="3" target="../CG3D_L23PyrRS/0/L23PyrRS" destination="synapses" segmentId="0" fractionAlong="0.5" weight="0.000097477548943"/>
            <inputW id="4" target="../CG3D_L23PyrRS/3/L23PyrRS" destination="synapses" segmentId="0" fractionAlong="0.5" weight="0.000057342860487"/>
            <inputW id="5" target="../CG3D_L23PyrRS/9/L23PyrRS" destination="synapses" segmentId="0" fractionAlong="0.5" weight="0.000083759826116"/>
            <inputW id="6" target="../CG3D_L23PyrRS/5/L23PyrRS" destination="synapses" segmentId="0" fractionAlong="0.5" weight="0.000090856926249"/>
            <inputW id="7" target="../CG3D_L23PyrRS/1/L23PyrRS" destination="synapses" segmentId="0" fractionAlong="0.5" weight="0.000084364098769"/>
            <inputW id="8" target="../CG3D_L23PyrRS/8/L23PyrRS" destination="synapses" segmentId="0" fractionAlong="0.5" weight="0.000064319396102"/>
            <inputW id="9" target="../CG3D_L23PyrRS/4/L23PyrRS" destination="synapses" segmentId="0" fractionAlong="0.5" weight="0.00009718461607"/>
        </inputList>
        <inputList id="BackgroundL23RS_TO_CG3D_L23PyrRS_0_0" population="CG3D_L23PyrRS" component="BackgroundL23RS_TO_CG3D_L23PyrRS_PoiSyn0">
            <input id="0" target="../CG3D_L23PyrRS/8/L23PyrRS" destination="synapses" segmentId="34" fractionAlong="0.468781"/>
            <input id="1" target="../CG3D_L23PyrRS/8/L23PyrRS" destination="synapses" segmentId="34" fractionAlong="0.404857"/>
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        </inputList>
        <inputList id="EctopicStimL23RS_TO_CG3D_L23PyrRS_0_0" population="CG3D_L23PyrRS" component="EctopicStimL23RS_TO_CG3D_L23PyrRS_PoiSyn0">
            <input id="0" target="../CG3D_L23PyrRS/8/L23PyrRS" destination="synapses" segmentId="143" fractionAlong="0.5"/>
            <input id="1" target="../CG3D_L23PyrRS/7/L23PyrRS" destination="synapses" segmentId="143" fractionAlong="0.5"/>
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        </inputList>
    </network>
</neuroml>
